<?xml version="1.0"?>

<propeller name="prop">
  <ixx>10.7</ixx>
  <diameter unit="M">1.8</diameter>
  <numblades> 6  </numblades>
  <minpitch>  22 </minpitch>
  <maxpitch>  22 </maxpitch>

  <table name="C_THRUST" type="internal">
    <tableData>
      0.0    6.8
      0.4    6.4
      1.1    0.8
      1.2   -0.1
      2.0   -6.4
      5.0   -6.8
    </tableData>
  </table>

  <table name="C_POWER" type = "internal">
    <tableData>
      0.0   5.80
      1.0   2.02
      2.0   4.45
      5.0   4.13
    </tableData>
  </table>

</propeller>
